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/batch
! ANSYS input file written by Workbench version 17.2 RELEASE
! File used for geometry attach: E:\Independent Study Slater\Ventricle-r2-Shar-4-16-17_files\dp0\Geom\DM\Geom.agdb
/title,Ventricle-r2-Shar-4-16-17--Transient (B5)
/com,--- Data in consistent MKS units. See Solving Units in the help system for more information.
/units,MKS
/prep7
! Turn off shape checking because checks already performed inside WB mesher.
! See help system for more information.
SHPP,OFF,,NOWARN
etcon,set             ! allow ANSYS to choose best KEYOP's for 180x elements
/com,*********** Nodes for the whole assembly ***********
nblock,3,,6678
(1i9,3e20.9e3)
        1   -7.534297122E-003    3.070178087E-002    1.000000000E-003
        2   -3.740812507E-003    4.353538047E-002    1.000000000E-003
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-1
/com,*********** Elements for Body 1 "valve_area_upper" ***********
et,1,186
keyo,1,2,1          ! set full integration on SOLID186
eblock,19,solid,,46
(19i9)
        1        1        1        1        0        0        0        0       20        0        1        1       23      117       10       46       24       72       37
      145      232      182      143      236      238      276      274      146      231      355      181
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-1
/com,*********** Elements for Body 2 "myocardium" ***********
et,2,186
keyo,2,2,1          ! set full integration on SOLID186
eblock,19,solid,,714
(19i9)
        2        2        2        2        0        0        0        0       20        0       47     1035     2038     2037     2035     1036     1713     1714     1715
     4018     5988     5986     4017     4021     5501     5503     4022     4016     5502     5504     5506
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-1
/com,*********** Send User Defined Coordinate System(s) ***********
csys,0
toffst,273.15,  ! Temperature offset from absolute zero
/com,*********** Set Reference Temperature ***********
tref,22.
/com,*********** Send Materials ***********
MP,EX,1,700000,	! Pa
MP,NUXY,1,0.4,
MP,DENS,1,1200,	! kg m^-3

MP,EX,2,700000,	! Pa
MP,NUXY,2,0.4,
MP,DENS,2,1200,	! kg m^-3

!************************* Model Summary ********************
!valve_area_upper,	myocardium,	matid,	1
!myocardium,	myocardium,	matid,	2
!************************* End Model Summary ********************
/com,*********** Fixed Supports ***********
CMBLOCK,_FIXEDSU,NODE,       92
(8i10)
        83        84        85        86        87        88       101       102
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cmsel,s,_FIXEDSU
d,all,all
nsel,all
/com,********* Frictionless Supports Z *********
CMBLOCK,_FRICSUZ,NODE,     5088
(8i10)
         1         2         3         4         5         6         7         8
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
cmsel,s,_FRICSUZ
d,all,uz,0
nsel,all
/com,*********** Create Elastic Support ***********
et,3,154
eblock,10,,,53
(15i9)
      761        3        3        3        0       64      125      103       86      339      407      382      338
      762        3        3        3        0       65      124      125       64      341      429      339      337
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-1
esel,s,type,,3
r,3,,,,10000000000000.
esel,all
/com,*********** Define Pressure Using Surface Effect Elements ***********
et,4,154
eblock,10,,,38
(15i9)
      814        4        4        4        0     2089     1626     1834     1917     5324     5323     5741     5865
      815        4        4        4        0     2090     1627     1626     2089     5326     5322     5324     6036
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-1
esel,s,type,,4
esel,all

*DIM,_loadvari300,TABLE,3,1,1,TIME,
! Time values
_loadvari300(1,0,1) = 0.
_loadvari300(2,0,1) = 0.1
_loadvari300(3,0,1) = 0.2
! Load values
_loadvari300(1,1,1) = 0.
_loadvari300(2,1,1) = 0.
_loadvari300(3,1,1) = 1000.

/com,*********** Define Pressure Using Surface Effect Elements ***********
et,5,154
eblock,10,,,20
(15i9)
      852        5        5        5        0     1896     1908     1843     1855     5844     5759     5758     5783
      853        5        5        5        0     1908     1909     1842     1843     5856     5757     5756     5759
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-1
esel,s,type,,5
esel,all

*DIM,_loadvari302,TABLE,2,1,1,TIME,
! Time values
_loadvari302(1,0,1) = 0.2
_loadvari302(2,0,1) = 0.3
! Load values
_loadvari302(1,1,1) = 0.
_loadvari302(2,1,1) = 1000.

/com,*********** Define Pressure Using Surface Effect Elements ***********
et,6,154
eblock,10,,,22
(15i9)
      872        6        6        6        0     1881     1886     1865     1870     5828     5803     5802     5812
      873        6        6        6        0     1886     1887     1864     1865     5834     5801     5800     5803
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-1
esel,s,type,,6
esel,all

*DIM,_loadvari304,TABLE,3,1,1,TIME,
! Time values
_loadvari304(1,0,1) = 0.
_loadvari304(2,0,1) = 0.3
_loadvari304(3,0,1) = 0.4
! Load values
_loadvari304(1,1,1) = 0.
_loadvari304(2,1,1) = 0.
_loadvari304(3,1,1) = 1000.

/com,*********** Create FSI Flags ***********
CMBLOCK,FSIN_1  ,NODE,      138
(8i10)
      1663      1664      1665      1666      1667      1668      1669      1670
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SF,FSIN_1,FSIN,1
nsel,all
CMBLOCK,FSIN_2  ,NODE,      131
(8i10)
      1756      1757      1758      1759      1760      1761      1762      1763
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SF,FSIN_2,FSIN,2
nsel,all
CMBLOCK,FSIN_3  ,NODE,      136
(8i10)
      1796      1797      1798      1799      1800      1801      1802      1803
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
SF,FSIN_3,FSIN,3
nsel,all
CMBLOCK,FSIN_4  ,NODE,      364
(8i10)
        47        48        49        50        51        52        53        54
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SF,FSIN_4,FSIN,4
nsel,all
esel,all
fini
/com,****************************************************************************
/com,*************************    SOLUTION       ********************************
/com,****************************************************************************
/solu
antype,4                   ! transient analysis
nlgeom,on                  ! Turn on Large Deformation Effects
kbc,1                      ! stepped BC's
eqsl,sparse,,,,,1
cntr,print,1               ! print out contact info and also make no initial contact an error
rstsuppress,none           ! don't suppress anything due to presense of FSI loading
dmpoption,emat,no             ! Don't combine emat file for DANSYS
dmpoption,esav,no             ! Don't combine esav file for DANSYS
cmwrite                    ! Export components due to presence of FSI loading
trnopt,full,,,,,hht        ! HHT time integration method
tintp,0.1	! Numerical Damping
nldiag,cont,iter           ! print out contact info each equilibrium iteration
rescontrol,define,last,last,,dele	   ! Program Controlled
/com,****************************************************
/com,******************* SOLVE FOR LS 1 OF 1 ****************
esel,s,type,,4
nsle
sf,all,pres,%_loadvari300%
esel,s,type,,5
nsle
sf,all,pres,%_loadvari302%
esel,s,type,,6
nsle
sf,all,pres,%_loadvari304%
nsel,all
esel,all
esel,all
autots,off                 ! User turned off automatic time stepping
nsub,1,1,1
time,1.
timint,on                  ! Turn on time integration effects
outres,erase
outres,all,none
outres,nsol,all
outres,rsol,all
outres,strs,all
outres,epel,all
outres,eppl,all
outres,v,all
outres,a,all
stabilize,off                   ! Stabilization turned OFF by user
nldiag,nrre,on,4
! *********** WB SOLVE COMMAND ***********
! check interactive state
*get,ANSINTER_,active,,int
*if,ANSINTER_,ne,0,then
/eof
*endif
solve
/com *************** Write FE CONNECTORS *********
CEWRITE,file,ce,,INTE
/com,****************************************************
/com,*************** FINISHED SOLVE FOR LS 1 *************
/post1
fini
